# import Sofa.Core

# def createScene(rootNode):
        # rootNode.addObject("OglGrid", nbSubdiv=10, size=1000)

        # rootNode.findData('gravity').value=[0.0,-981.0,0.0];
        # rootNode.findData('dt').value=0.01

        # confignode = rootNode.addChild("Config")
        # confignode.addObject('RequiredPlugin', name="SofaMiscCollision", printLog=False)
        # confignode.addObject('RequiredPlugin', name="SofaPython3", printLog=False)
        # confignode.addObject('RequiredPlugin', name="Sofa.GL.Component.Rendering3D", printLog=False)
        # confignode.addObject('RequiredPlugin', name="Sofa.Component.Collision.Detection.Algorithm", printLog=False)
        # confignode.addObject('RequiredPlugin', name="Sofa.Component.AnimationLoop", printLog=False)

        # confignode.addObject('RequiredPlugin', name="Sofa.Component.Mass", printLog=False)
        # confignode.addObject('OglSceneFrame', style="Arrows", alignment="TopRight")


        # #Collision function

        # rootNode.addObject('DefaultPipeline')
        # rootNode.addObject('FreeMotionAnimationLoop')
        # rootNode.addObject('GenericConstraintSolver', tolerance="1e-6", maxIterations="1000")
        # rootNode.addObject('BruteForceDetection')
        # rootNode.addObject('RuleBasedContactManager', responseParams="mu="+str(0.0), name='Response', response='FrictionContactConstraint')
        # rootNode.addObject('LocalMinDistance', alarmDistance=10, contactDistance=5, angleCone=0.01)

        # ### Mechanical model

        # totalMass = 1.0
        # volume = 1.0
        # inertiaMatrix=[1., 0., 0., 0., 1., 0., 0., 0., 1.]

        # #Creating the floor
        # floor = rootNode.addChild("floor")

        # floor.addObject('MechanicalObject', name="mstate", template="Rigid3", translation2=[0.0,-300.0,0.0], rotation2=[0., 0., 0.], showObjectScale=5.0)

        # floor.addObject('UniformMass', name="mass", vertexMass=[totalMass, volume, inertiaMatrix[:]])
        # floorCollis = floor.addChild('collision')
        # floorCollis.addObject('MeshObjLoader', name="loader", filename="/home/yi/peg_in_hole/SofaGym/mesh/floor.obj", triangulate="true")
        # floorCollis.addObject('MeshTopology', src="@loader")
        # floorCollis.addObject('MechanicalObject')
        # floorCollis.addObject('TriangleCollisionModel', moving=False, simulated=False)
        # floorCollis.addObject('LineCollisionModel', moving=False, simulated=False)
        # floorCollis.addObject('PointCollisionModel', moving=False, simulated=False)

        # floorCollis.addObject('RigidMapping')

        # #### visualization
        # floorVisu = floor.addChild("VisualModel")
        # floorVisu.loader = floorVisu.addObject('MeshObjLoader', name="loader", filename="/home/yi/peg_in_hole/SofaGym/mesh/floor.obj")
        # floorVisu.addObject('OglModel', name="model", src="@loader", scale3d=[5.0]*3, color=[1., 1., 0.], updateNormals=False)
        # floorVisu.addObject('RigidMapping')

        # #Creating the sphere
        # sphere = rootNode.addChild("sphere")
        # sphere.addObject('MechanicalObject', name="mstate", template="Rigid3", translation2=[0., 0., 0.], rotation2=[0., 0., 0.], showObjectScale=50)
        # sphere.addObject('UniformMass', name="mass", vertexMass=[totalMass, volume, inertiaMatrix[:]])
        # sphere.addObject('UncoupledConstraintCorrection')

        # sphere.addObject('EulerImplicitSolver', name='odesolver')
        # sphere.addObject('CGLinearSolver', name='Solver')

        # collision = sphere.addChild('collision')
        # collision.addObject('MeshObjLoader', name="loader", filename="/home/yi/peg_in_hole/SofaGym/mesh/ball.obj", triangulate="true")

        # collision.addObject('MeshTopology', src="@loader")
        # collision.addObject('MechanicalObject')
        # collision.addObject('TriangleCollisionModel')
        # collision.addObject('LineCollisionModel')
        # collision.addObject('PointCollisionModel')

        # collision.addObject('RigidMapping')

        # #### visualization
        # sphereVisu = sphere.addChild("VisualModel")
        # sphereVisu.loader = sphereVisu.addObject('MeshObjLoader', name="loader", filename="/home/yi/peg_in_hole/SofaGym/mesh/ball.obj")
        # sphereVisu.addObject('OglModel', name="model", src="@loader", scale3d=[50]*3, color=[0., 1., 0.], updateNormals=False)
        # sphereVisu.addObject('RigidMapping')

        # return rootNode
# root = Sofa.Core.Node("root")
# createScene(root)


# import Sofa


# # Choose in your script to activate or not the GUI
# USE_GUI = True


# def main():
    # import SofaRuntime
    # import Sofa.Gui

    # root = Sofa.Core.Node("root")
    # createScene(root)
    # Sofa.Simulation.init(root)

    # if not USE_GUI:
        # for iteration in range(10):
            # Sofa.Simulation.animate(root, root.dt.value)
    # else:
        # Sofa.Gui.GUIManager.Init("myscene", "qglviewer")
        # Sofa.Gui.GUIManager.createGUI(root, __file__)
        # Sofa.Gui.GUIManager.SetDimension(1080, 1080)
        # Sofa.Gui.GUIManager.MainLoop(root)
        # Sofa.Gui.GUIManager.closeGUI()


# def createScene(root):
    # root.gravity=[0, -9.81, 0]
    # root.dt=0.02

    # root.addObject('DefaultVisualManagerLoop')
    # root.addObject('DefaultAnimationLoop')

    # root.addObject('VisualStyle', displayFlags="showCollisionModels hideVisualModels showForceFields")
    # root.addObject('RequiredPlugin', pluginName="SofaImplicitOdeSolver SofaLoader SofaOpenglVisual SofaBoundaryCondition SofaGeneralLoader SofaGeneralSimpleFem")
    # root.addObject('RequiredPlugin', name="Sofa.Component.Collision.Detection.Algorithm", printLog=False)
    # root.addObject('RequiredPlugin', name="Sofa.Component.Collision.Detection.Intersection", printLog=False)
    # root.addObject('RequiredPlugin', name="Sofa.Component.LinearSolver.Iterative", printLog=False)
    # root.addObject('RequiredPlugin', name="Sofa.Component.Mass", printLog=False)
    # root.addObject('DefaultPipeline', name="CollisionPipeline")
    # root.addObject('BruteForceDetection', name="N2")
    # root.addObject('DefaultContactManager', name="CollisionResponse", response="PenalityContactForceField")
    # root.addObject('DiscreteIntersection')

    # root.addObject('MeshObjLoader', name="LiverSurface", filename="mesh/liver-smooth.obj")

    # liver = root.addChild('Liver')
    # liver.addObject('EulerImplicitSolver', name="cg_odesolver", rayleighStiffness=0.1, rayleighMass=0.1)
    # liver.addObject('CGLinearSolver', name="linear_solver", iterations=25, tolerance=1e-09, threshold=1e-09)
    # liver.addObject('MeshGmshLoader', name="meshLoader", filename="mesh/liver.msh")
    # liver.addObject('TetrahedronSetTopologyContainer', name="topo", src="@meshLoader")
    # liver.addObject('MechanicalObject', name="dofs", src="@meshLoader")
    # liver.addObject('TetrahedronSetGeometryAlgorithms', template="Vec3d", name="GeomAlgo")
    # liver.addObject('DiagonalMass', name="Mass", massDensity=1.0)
    # liver.addObject('TetrahedralCorotationalFEMForceField', template="Vec3d", name="FEM", method="large", poissonRatio=0.3, youngModulus=3000, computeGlobalMatrix=False)
    # liver.addObject('FixedConstraint', name="FixedConstraint", indices="3 39 64")

    # visu = liver.addChild('Visu')
    # visu.addObject('OglModel', name="VisualModel", src="@../../LiverSurface")
    # visu.addObject('BarycentricMapping', name="VisualMapping", input="@../dofs", output="@VisualModel")

    # surf = liver.addChild('Surf')
    # surf.addObject('SphereLoader', name="sphereLoader", filename="mesh/liver.sph")
    # surf.addObject('MechanicalObject', name="spheres", position="@sphereLoader.position")
    # surf.addObject('SphereCollisionModel', name="CollisionModel", listRadius="@sphereLoader.listRadius")
    # surf.addObject('BarycentricMapping', name="CollisionMapping", input="@../dofs", output="@spheres")

    # root.addObject(KeyPressedController(name = "SphereCreator"))

    # return root


# class KeyPressedController(Sofa.Core.Controller):
    # """ This controller monitors new sphere objects.
    # Press ctrl and the L key to make spheres falling!
    # """
    # def __init__(self, *args, **kwargs):
        # Sofa.Core.Controller.__init__(self, *args, **kwargs)
        # self.iteration = 0

    # def onKeypressedEvent(self, event):
        # # Press L key triggers the creation of new objects in the scene
        # if event['key']=='L':
            # self.createNewSphere()

    # def createNewSphere(self):
        # root = self.getContext()
        # newSphere = root.addChild('FallingSphere-'+str(self.iteration))
        # newSphere.addObject('EulerImplicitSolver')
        # newSphere.addObject('CGLinearSolver', threshold='1e-09', tolerance='1e-09', iterations='200')
        # MO = newSphere.addObject('MechanicalObject', showObject=True, position=[-2, 10+self.iteration, 0, 0, 0, 0, 1], name=f'Particle-{self.iteration}', template='Rigid3d')
        # Mass = newSphere.addObject('UniformMass', totalMass=1)
        # Force = newSphere.addObject('ConstantForceField', name="CFF", totalForce=[0, -1, 0, 0, 0, 0] )
        # Sphere = newSphere.addObject('SphereCollisionModel', name="SCM", radius=1.0 )

        # newSphere.init()
        # self.iteration = self.iteration+1


# # Function used only if this script is called from a python environment
# if __name__ == '__main__':
    # main()


import Sofa


# Choose in your script to activate or not the GUI
USE_GUI = True


def main():
    import SofaRuntime
    import Sofa.Gui
    SofaRuntime.importPlugin("Sofa.GL.Component.Rendering3D")
    # SofaRuntime.importPlugin("Sofa.GL.Component.Shader")
    SofaRuntime.importPlugin("Sofa.Component.ODESolver.Backward")

    root = Sofa.Core.Node("root")
    createScene(root)
    Sofa.Simulation.init(root)

    if not USE_GUI:
        for iteration in range(10):
            Sofa.Simulation.animate(root, root.dt.value)
    else:
        Sofa.Gui.GUIManager.Init("myscene", "qglviewer")
        Sofa.Gui.GUIManager.createGUI(root, __file__)
        Sofa.Gui.GUIManager.SetDimension(1080, 1080)
        Sofa.Gui.GUIManager.MainLoop(root)
        Sofa.Gui.GUIManager.closeGUI()


def createScene(root):
    root.gravity=[0, -9.81, 0]
    root.dt=0.02

    root.addObject('DefaultVisualManagerLoop')
    root.addObject('DefaultAnimationLoop')

    root.addObject('VisualStyle', displayFlags="showCollisionModels")
    root.addObject('RequiredPlugin', pluginName="Sofa.Component")
    root.addObject('RequiredPlugin', name="Sofa.Component.Collision.Detection.Algorithm", printLog=False)
    root.addObject('RequiredPlugin', name="Sofa.Component.Collision.Detection.Intersection", printLog=False)
    root.addObject('RequiredPlugin', name="Sofa.Component.LinearSolver.Iterative", printLog=False)
    root.addObject('RequiredPlugin', name="Sofa.Component.Mass", printLog=False)
    root.addObject('DefaultPipeline', name="CollisionPipeline")
    root.addObject('BruteForceBroadPhase', name="BroadPhase")
    root.addObject('BVHNarrowPhase', name="NarrowPhase")
    root.addObject('DefaultContactManager', name="CollisionResponse", response="PenalityContactForceField")
    root.addObject('DiscreteIntersection')

    root.addObject('MeshObjLoader', name="LiverSurface", filename="mesh/liver-smooth.obj")

    liver = root.addChild('Liver')
    liver.addObject('EulerImplicitSolver', name="cg_odesolver", rayleighStiffness="0.1", rayleighMass="0.1")
    liver.addObject('CGLinearSolver', name="linear_solver", iterations="25", tolerance="1e-09", threshold="1e-09")
    liver.addObject('MeshGmshLoader', name="meshLoader", filename="mesh/liver.msh")
    liver.addObject('TetrahedronSetTopologyContainer', name="topo", src="@meshLoader")
    liver.addObject('MechanicalObject', name="dofs", src="@meshLoader")
    liver.addObject('TetrahedronSetGeometryAlgorithms', template="Vec3d", name="GeomAlgo")
    liver.addObject('DiagonalMass', name="Mass", massDensity="1.0")
    liver.addObject('TetrahedralCorotationalFEMForceField', template="Vec3d", name="FEM", method="large", poissonRatio="0.3", youngModulus="3000", computeGlobalMatrix="0")
    liver.addObject('FixedConstraint', name="FixedConstraint", indices="3 39 64")

    visu = liver.addChild('Visu')
    visu.addObject('OglModel', name="VisualModel", src="@../../LiverSurface")
    visu.addObject('BarycentricMapping', name="VisualMapping", input="@../dofs", output="@VisualModel")

    surf = liver.addChild('Surf')
    surf.addObject('SphereLoader', name="sphereLoader", filename="mesh/liver.sph")
    surf.addObject('MechanicalObject', name="spheres", position="@sphereLoader.position")
    surf.addObject('SphereCollisionModel', name="CollisionModel", listRadius="@sphereLoader.listRadius")
    surf.addObject('BarycentricMapping', name="CollisionMapping", input="@../dofs", output="@spheres")

    return root


# Function used only if this script is called from a python environment
if __name__ == '__main__':
    main()
